// COMSOL Multiphysics 6.4.0.343 model "comsol.mph"
// Outline of the model tree

Functions
  int1: Interpolation
    importedname = sortiePhreeqC.txt
    funcnametable = {int1, 1}
    source = file
    filename = C:\Users\AL274877\Desktop\PhreeqC-Comsol\ex11PhreeqCv.0.1\IC.txt
    defvars = on
    filecolumns = 20
    columnKeys = {col1, col2, col3, col4, col5, col6, col7, col8, col9, col10, col11, col12, col13, col14, col15, col16, col17, col18, col19, col20}
    columnType = {col1, arg, col2, value, col3, value, col4, value, col5, value, col6, value, col7, value, col8, value, col9, value, col10, value, col11, value, col12, value, col13, value, col14, value, col15, value, col16, value, col17, value, col18, value, col19, value, col20, value}
    funcnames = {col1, int1, col2, CaX2i, col3, KXi, col4, NaXi, col5, NH4Xi, col6, Caplusdi, col7, CaOHplusi, col8, Clmoinsi, col9, Hplusi, col10, H2i, col11, Kplusi, col12, N2i, col13, Naplusi, col14, NaOHi, col15, NH3i, col16, NH4plusi, col17, NO2moinsi, col18, NO3moinsi, col19, O2i, col20, OHmoinsi}
    fununit = {mol/L, mol/L, mol/L, mol/L, mol/L, mol/L, mol/L, mol/L, mol/L, mol/L, mol/L, mol/L, mol/L, mol/L, mol/L, mol/L, mol/L, mol/L, mol/L}
    argunit = m
    plotfuncname = all

Geometry
  geom1 "Geometry 1" (1D, length unit m)
    i1: Interval | coord = {0, 0.08}
    fin: Finalize "Form Union"

Physics
  tds: DilutedSpeciesInPorousMedia "Transport of Diluted Species in Porous Media" on all domains
    dependent variable CaX2 = {CaX2, KX, NaX, NH4X, Caplus2, CaOHplus, Clminus, Hplus, H2, Kplus, N2, Naplus, NaOH, NH3, NH4plus, NO2minus, NO3minus, O2, OHminus}
    porous1: PorousMedium (default)
      fluid1: FluidPorousMedium "Fluid 1" (default)
        u = {2.778e-6, 0, 0}
        DiffusionCoefficientSource = chem
        FluidDiffusivityModelType = UserDefined
        ume = 
          {1e-13[s*mol/kg], 0, 0, 0, 1e-13[s*mol/kg], 0, 0, 0, 1e-13[s*mol/kg]}
          {1e-13[s*mol/kg], 0, 0, 0, 1e-13[s*mol/kg], 0, 0, 0, 1e-13[s*mol/kg]}
          {1e-13[s*mol/kg], 0, 0, 0, 1e-13[s*mol/kg], 0, 0, 0, 1e-13[s*mol/kg]}
          {1e-13[s*mol/kg], 0, 0, 0, 1e-13[s*mol/kg], 0, 0, 0, 1e-13[s*mol/kg]}
          {1e-13[s*mol/kg], 0, 0, 0, 1e-13[s*mol/kg], 0, 0, 0, 1e-13[s*mol/kg]}
          {1e-13[s*mol/kg], 0, 0, 0, 1e-13[s*mol/kg], 0, 0, 0, 1e-13[s*mol/kg]}
          {1e-13[s*mol/kg], 0, 0, 0, 1e-13[s*mol/kg], 0, 0, 0, 1e-13[s*mol/kg]}
          {1e-13[s*mol/kg], 0, 0, 0, 1e-13[s*mol/kg], 0, 0, 0, 1e-13[s*mol/kg]}
          {1e-13[s*mol/kg], 0, 0, 0, 1e-13[s*mol/kg], 0, 0, 0, 1e-13[s*mol/kg]}
          {1e-13[s*mol/kg], 0, 0, 0, 1e-13[s*mol/kg], 0, 0, 0, 1e-13[s*mol/kg]}
          {1e-13[s*mol/kg], 0, 0, 0, 1e-13[s*mol/kg], 0, 0, 0, 1e-13[s*mol/kg]}
          {1e-13[s*mol/kg], 0, 0, 0, 1e-13[s*mol/kg], 0, 0, 0, 1e-13[s*mol/kg]}
          {1e-13[s*mol/kg], 0, 0, 0, 1e-13[s*mol/kg], 0, 0, 0, 1e-13[s*mol/kg]}
          {1e-13[s*mol/kg], 0, 0, 0, 1e-13[s*mol/kg], 0, 0, 0, 1e-13[s*mol/kg]}
          {1e-13[s*mol/kg], 0, 0, 0, 1e-13[s*mol/kg], 0, 0, 0, 1e-13[s*mol/kg]}
          {1e-13[s*mol/kg], 0, 0, 0, 1e-13[s*mol/kg], 0, 0, 0, 1e-13[s*mol/kg]}
          {1e-13[s*mol/kg], 0, 0, 0, 1e-13[s*mol/kg], 0, 0, 0, 1e-13[s*mol/kg]}
          {1e-13[s*mol/kg], 0, 0, 0, 1e-13[s*mol/kg], 0, 0, 0, 1e-13[s*mol/kg]}
          {1e-13[s*mol/kg], 0, 0, 0, 1e-13[s*mol/kg], 0, 0, 0, 1e-13[s*mol/kg]}
        epsilonr = 80
        Dchem_CaX2 = 0
        Dchem_KX = 0
        Dchem_NaX = 0
        Dchem_NH4X = 0
        Dchem_CaOHplus = 0
        Dchem_Hplus = 0
        Dchem_H2 = 0
        Dchem_Kplus = 0
        Dchem_N2 = 0
        Dchem_Naplus = 0
        Dchem_NaOH = 0
        Dchem_NH3 = 0
        Dchem_NH4plus = 0
        Dchem_O2 = 0
        DF_c1 = {{1e-9[m^2/s]}, {0}, {0}, {0}, {1e-9[m^2/s]}, {0}, {0}, {0}, {1e-9[m^2/s]}}
        Dchem_c1 = {{1e-9[m^2/s]}, {0}, {0}, {0}, {1e-9[m^2/s]}, {0}, {0}, {0}, {1e-9[m^2/s]}}
        DF_c2 = {{1e-9[m^2/s]}, {0}, {0}, {0}, {1e-9[m^2/s]}, {0}, {0}, {0}, {1e-9[m^2/s]}}
        Dchem_c2 = {{1e-9[m^2/s]}, {0}, {0}, {0}, {1e-9[m^2/s]}, {0}, {0}, {0}, {1e-9[m^2/s]}}
        DF_c3 = {{1e-9[m^2/s]}, {0}, {0}, {0}, {1e-9[m^2/s]}, {0}, {0}, {0}, {1e-9[m^2/s]}}
        Dchem_c3 = {{1e-9[m^2/s]}, {0}, {0}, {0}, {1e-9[m^2/s]}, {0}, {0}, {0}, {1e-9[m^2/s]}}
        DF_c4 = {{1e-9[m^2/s]}, {0}, {0}, {0}, {1e-9[m^2/s]}, {0}, {0}, {0}, {1e-9[m^2/s]}}
        Dchem_c4 = {{1e-9[m^2/s]}, {0}, {0}, {0}, {1e-9[m^2/s]}, {0}, {0}, {0}, {1e-9[m^2/s]}}
        DF_c5 = {{1e-9[m^2/s]}, {0}, {0}, {0}, {1e-9[m^2/s]}, {0}, {0}, {0}, {1e-9[m^2/s]}}
        Dchem_c5 = {{1e-9[m^2/s]}, {0}, {0}, {0}, {1e-9[m^2/s]}, {0}, {0}, {0}, {1e-9[m^2/s]}}
        DF_c6 = {{1e-9[m^2/s]}, {0}, {0}, {0}, {1e-9[m^2/s]}, {0}, {0}, {0}, {1e-9[m^2/s]}}
        Dchem_c6 = {{1e-9[m^2/s]}, {0}, {0}, {0}, {1e-9[m^2/s]}, {0}, {0}, {0}, {1e-9[m^2/s]}}
        DF_c7 = {{1e-9[m^2/s]}, {0}, {0}, {0}, {1e-9[m^2/s]}, {0}, {0}, {0}, {1e-9[m^2/s]}}
        Dchem_c7 = {{1e-9[m^2/s]}, {0}, {0}, {0}, {1e-9[m^2/s]}, {0}, {0}, {0}, {1e-9[m^2/s]}}
        DF_c8 = {{1e-9[m^2/s]}, {0}, {0}, {0}, {1e-9[m^2/s]}, {0}, {0}, {0}, {1e-9[m^2/s]}}
        Dchem_c8 = {{1e-9[m^2/s]}, {0}, {0}, {0}, {1e-9[m^2/s]}, {0}, {0}, {0}, {1e-9[m^2/s]}}
        DF_c9 = {{1e-9[m^2/s]}, {0}, {0}, {0}, {1e-9[m^2/s]}, {0}, {0}, {0}, {1e-9[m^2/s]}}
        Dchem_c9 = {{1e-9[m^2/s]}, {0}, {0}, {0}, {1e-9[m^2/s]}, {0}, {0}, {0}, {1e-9[m^2/s]}}
        DF_c10 = {{1e-9[m^2/s]}, {0}, {0}, {0}, {1e-9[m^2/s]}, {0}, {0}, {0}, {1e-9[m^2/s]}}
        Dchem_c10 = {{1e-9[m^2/s]}, {0}, {0}, {0}, {1e-9[m^2/s]}, {0}, {0}, {0}, {1e-9[m^2/s]}}
        DF_c11 = {{1e-9[m^2/s]}, {0}, {0}, {0}, {1e-9[m^2/s]}, {0}, {0}, {0}, {1e-9[m^2/s]}}
        Dchem_c11 = {{1e-9[m^2/s]}, {0}, {0}, {0}, {1e-9[m^2/s]}, {0}, {0}, {0}, {1e-9[m^2/s]}}
        DF_c12 = {{1e-9[m^2/s]}, {0}, {0}, {0}, {1e-9[m^2/s]}, {0}, {0}, {0}, {1e-9[m^2/s]}}
        Dchem_c12 = {{1e-9[m^2/s]}, {0}, {0}, {0}, {1e-9[m^2/s]}, {0}, {0}, {0}, {1e-9[m^2/s]}}
        DF_c13 = {{1e-9[m^2/s]}, {0}, {0}, {0}, {1e-9[m^2/s]}, {0}, {0}, {0}, {1e-9[m^2/s]}}
        Dchem_c13 = {{1e-9[m^2/s]}, {0}, {0}, {0}, {1e-9[m^2/s]}, {0}, {0}, {0}, {1e-9[m^2/s]}}
        DF_c14 = {{1e-9[m^2/s]}, {0}, {0}, {0}, {1e-9[m^2/s]}, {0}, {0}, {0}, {1e-9[m^2/s]}}
        Dchem_c14 = {{1e-9[m^2/s]}, {0}, {0}, {0}, {1e-9[m^2/s]}, {0}, {0}, {0}, {1e-9[m^2/s]}}
        DF_c15 = {{1e-9[m^2/s]}, {0}, {0}, {0}, {1e-9[m^2/s]}, {0}, {0}, {0}, {1e-9[m^2/s]}}
        Dchem_c15 = {{1e-9[m^2/s]}, {0}, {0}, {0}, {1e-9[m^2/s]}, {0}, {0}, {0}, {1e-9[m^2/s]}}
        DF_c16 = {{1e-9[m^2/s]}, {0}, {0}, {0}, {1e-9[m^2/s]}, {0}, {0}, {0}, {1e-9[m^2/s]}}
        Dchem_c16 = {{1e-9[m^2/s]}, {0}, {0}, {0}, {1e-9[m^2/s]}, {0}, {0}, {0}, {1e-9[m^2/s]}}
        DF_c17 = {{1e-9[m^2/s]}, {0}, {0}, {0}, {1e-9[m^2/s]}, {0}, {0}, {0}, {1e-9[m^2/s]}}
        Dchem_c17 = {{1e-9[m^2/s]}, {0}, {0}, {0}, {1e-9[m^2/s]}, {0}, {0}, {0}, {1e-9[m^2/s]}}
        DF_c18 = {{1e-9[m^2/s]}, {0}, {0}, {0}, {1e-9[m^2/s]}, {0}, {0}, {0}, {1e-9[m^2/s]}}
        Dchem_c18 = {{1e-9[m^2/s]}, {0}, {0}, {0}, {1e-9[m^2/s]}, {0}, {0}, {0}, {1e-9[m^2/s]}}
        DF_c19 = {{1e-9[m^2/s]}, {0}, {0}, {0}, {1e-9[m^2/s]}, {0}, {0}, {0}, {1e-9[m^2/s]}}
        Dchem_c19 = {{1e-9[m^2/s]}, {0}, {0}, {0}, {1e-9[m^2/s]}, {0}, {0}, {0}, {1e-9[m^2/s]}}
        Dchem_Caplusd = 0
        Dchem_Clmoins = 0
        Dchem_Xic = 0
        Dchem_OHmoins = 0
        Dchem_NO3moins = 0
        Dchem_NO2moins = 0
      pm1: PorousMatrixPorousMedium "Porous Matrix 1" (default) | poro_mat = userdef; poro = 1
      disp1: Dispersion on all domains | DispersionTensor = Dispersivity; alphaL = 0.002
    nflx1: NoFlux (default)
    init1: init "Initial Values 1" (default) | initc = {0, 0, 0, 0, 0, 0, 0, 1e-4, 0, 0.2, 0, 1, 0, 0, 0, 0, 1.2, 0, 1e-4}
    conc1: Concentration on boundaries 1
      species = {0, 0, 0, 0, 1, 1, 1, 1, 1, 1, 1, 1, 1, 1, 1, 1, 1, 1, 1}
      c0 = {0, 0, 0, 0, 0.6, 0, 1.2, 1e-4, 0, 0, 0, 0, 0, 0, 0, 0, 0, 0, 1e-4}
    init2: init "Initial Values 2" on all domains
      initc = {CaX2i, KXi, NaXi, NH4Xi, Caplusdi, CaOHplusi, Clmoinsi, Hplusi, H2i, Kplusi, N2i, Naplusi, NaOHi, NH3i, NH4plusi, NO2moinsi, NO3moinsi, O2i, OHmoinsi}

Mesh
  mesh1 "Mesh 1"
    size: MeshSizeDefault | hmax = 0.002; hauto = 2; custom = on
    edg1: Edge on remaining entities

Studies
  std1 "Study 1"
    time: Transient "Time Dependent" | tlist = range(0,720,720)

Solver configurations
  sol1 "Solution 1" (study std1)
    v1: Variables "Dependent Variables 1"
    t1: Time "Time-Dependent Solver 1"
      fc1: FullyCoupled
      d1: Direct "Direct, concentrations (tds)"

Datasets
  dset1: Solution | solution = sol1
  int1_ds1: Grid1D

Plots
  pg1: PlotGroup1D "Concentrations, All Species (tds)" | data = dset1; title = Concentrations, All Species
    lngr1: LineGraph "Species CaX2" on domains 1
      expr = Naplus
      descr = Concentration
      xdata = expr
      xdataexpr = x
      autosolution = off

Exports
  data1: Data
    data = dset1
    expr = {CaX2i, KXi, NaXi, NH4Xi, Caplus2, CaOHplus, Clminus, Hplus, H2, Kplus, N2, Naplus, NaOH, NH3, NH4plus, NO2minus, NO3minus, O2, OHminus, }
    unit = {mol/L, mol/L, mol/L, mol/L, mol/L, mol/L, mol/L, mol/L, mol/L, mol/L, mol/L, mol/L, mol/L, mol/L, mol/L, mol/L, mol/L, mol/L, mol/L, }
    descr = {CaX2, KX, NaX, NH4X, Ca+2, CaOH+, Cl-, H+, H2, K+, N2, Na+, NaOH, NH3, NH4+, NO2-, NO3-, O2, OH-, }
    filename = CIex11.txt