// COMSOL Multiphysics 6.4.0.343 model "AldicarbInfiltration.mph"
// Pesticide Transport and Reaction in Soil
// This example investigates the degradation of the insecticide Aldicarb. The carbamate initially decomposes into a sulfone which subsequently decays into a sulfoxide. Biodegradation reactions provide important pathways to reduce the amounts of toxic substances. A second modeling stages uses the computed reaction kinetics in a space-dependent model that describes the contamination of soil through Aldicarb transport and reaction.
// Outline of the model tree

Parameters
  k_1 = 0.36[1/d]  // Rate constant, reaction 1
  k_2 = 0.024[1/d]  // Rate constant, reaction 2
  k_3 = 0.2[1/d]  // Rate constant, reaction 3
  k_4 = 0.01[1/d]  // Rate constant, reaction 4
  k_5 = 0.0524[1/d]  // Rate constant, reaction 5
  rhof = 1e3[kg/m^3]  // Fluid density
  poro_1 = 0.339  // Porosity, layer 1
  poro_2 = 0.399  // Porosity, layer 2
  thetar_1 = 0.001  // Residual saturation, layer 1
  thetar_2 = 0.001  // Residual saturation, layer 2
  Sp_1 = 0.339[1/m]/(g_const*rhof)  // Storage coefficient, layer 1
  Sp_2 = 0.399[1/m]/(g_const*rhof)  // Storage coefficient, layer 2
  Ks_1 = 0.454[m/d]  // Saturated hydraulic conductivity, layer 1
  Ks_2 = 0.298[m/d]  // Saturated hydraulic conductivity, layer 2
  alpha_1 = 1.39[1/m]  // Van Genuchten parameter alpha, layer 1
  alpha_2 = 1.74[1/m]  // Van Genuchten parameter alpha, layer 2
  n_1 = 1.6  // Van Genuchten parameter n, layer 1
  n_2 = 1.38  // Van Genuchten parameter n, layer 2
  Hp0 = 0.01[m]  // Pressure head in the ring
  N0 = 0.01*Ks_1*rhof  // Leak from the base
  c0 = 1[mol/m^3]  // Solute concentration in the ring
  rhob = 1300[kg/m^3]  // Bulk density
  kp_a = 1e-4[m^3/kg]  // Partition coefficient, aldicarb
  kp_asx = 0.5e-4[m^3/kg]  // Partition coefficient, aldicarb sulfoxide
  kp_asn = 2e-4[m^3/kg]  // Partition coefficient, aldicarb sulfone
  Dl = 3.74e-3[m^2/d]  // Diffusion coefficient, liquid phase
  Dg = 0.432[m^2/d]  // Diffusion coefficient, gas phase
  alphar = 0.005[m]  // Longitudinal dispersivity
  alphaz = 0.001[m]  // Transverse dispersivity
  kg_a = 1.33e-7  // Volatilization
  kg_asn = 1.33e-3  // Volatilization
  d_s = 0.05[m]  // Thickness of the concentration boundary layer

Functions
  int1: Interpolation
    importedname = CI.txt
    funcnametable = {int1, 1}
    source = file
    filename = C:\Users\AL274877\Desktop\PhreeqC-Comsol\Aldicarb\Speciation\ORCHESTRA_192.txt
    defvars = on
    filecolumns = 11
    columnKeys = {col1, col2, col3, col4, col5, col6, col7, col8, col9, col10, col11}
    columnType = {col1, arg, col2, arg, col3, value, col4, value, col5, value, col6, value, col7, value, col8, value, col9, value, col10, value, col11, value}
    funcnames = {col1, int1a, col2, int1, col3, Aldi, col4, Oxime, col5, Sulfoxide, col6, Sulfoxide_ox, col7, Sulfone, col8, Sulfone_ox, col9, pIF, col10, ratio, col11, time}
    fununit = {mol/L, mol/L, mol/L, mol/L, mol/L, mol/L, Pa, 1, 1}
    argunit = {m, m}
    plotfuncname = Aldi

Variables
  var1 "Variables 1"
    r_1 = k_1*c_a  // Rate expression 1
    r_2 = k_2*c_asx  // Rate expression 2
    r_3 = k_3*c_a  // Rate expression 3
    r_4 = k_4*c_asx  // Rate expression 4
    r_5 = k_5*c_asn  // Rate expression 5

Coordinate systems
  ie1: InfiniteElement "Infinite Element Domain 1" on domains 3, 4 | ScalingType = Cylindrical

Geometry
  geom1 "Geometry 1" (2D axisymmetric, length unit m)
    r1: Rectangle
      size = {1.5, 0.9}
      pos = {0, -1.3}
      layername = Layer 1
      layer = 0.25
      layernameold = Layer 1
      layerright = on
      layerbottom = off
    r2: Rectangle
      size = {1.5, 0.4}
      pos = {0, -0.4}
      layername = Layer 1
      layer = 0.25
      layernameold = Layer 1
      layerright = on
      layerbottom = off
    pt1: Point | p = {0.25, }
    fin: Finalize "Form Union"

Materials
  pmat1: PorousMedia "Porous Material: Lower Layer" on all domains
    poro: poro "Porous model"
      porosity = 1
    fluid1: Fluid
      def: def "Basic"
        density = rhof
      poro: poro "Porous model"
        porosity = 1
    solid1: Solid
      def: def "Basic"
        density = rhob
      poro: poro "Porous model"
        porosity = 1
  pmat2: PorousMedia "Porous Material: Upper Layer" on domains 2, 4
    // same settings as pmat1

Physics
  ge: GlobalEquations "Global ODEs and DAEs" (disabled)
    EquationForm.form = Automatic
    ge1: GlobalEquations
      name = {cpm_a, cpm_asx, cpm_asn, cpm_ao, cpm_asxo, cpm_asno}
      equation = {cpm_at+k_1*cpm_a+k_3*cpm_a, cpm_asxt-k_1*cpm_a+k_2*cpm_asx+k_4*cpm_asx, cpm_asnt-k_2*cpm_asx+k_5*cpm_asn, cpm_aot-k_3*cpm_a, cpm_asxot-k_4*cpm_asx, cpm_asnot-k_5*cpm_asn}
      initialValueU = {1, 0, 0, 0, 0, 0}
      initialValueUt = {0, 0, 0, 0, 0, 0}
      description = {Aldicarb, Aldicarb sulfoxide, Aldicarb sulfone, Aldicarb oxime, Aldicarb sulfoxide oxime, Aldicarb sulfone oxime}
      valueType = complex
      fieldName = ODE1
      DependentVariableQuantity = concentration
      CustomDependentVariableUnit = m
      SourceTermQuantity = reactionrate
      CustomSourceTermUnit = m
  dl: PorousMediaFlowRichards "Richards' Equation" on all domains
    dependent variable p
    ShapeProperty.order_pressure = 1
    usporous1: UnsaturatedPorousMedium (default) | storageModelType = userdef; Sp = Sp_1
      fluid1: FluidPorousMedium "Fluid 1" (default)
        fluid = dommat
        fluidType = compressible
        gasConstantType = specificGC
        Constitutiverelation = newtonian
        nonNewtonianModels = powerLaw
        gamma_ref = 1[1/s]
        gamma_lowlimit = 0.01[1/s]
        alpha = 1
        C = 4
        Twlf = 293.15[K]
        C1wlf = 8.86
        C2wlf = 51.6[K]
        T0 = 293.15[K]
        alphaT = 1
        shift_temperature = dl.Tref
      pm1: PorousMatrixPorousMedium "Porous Matrix 1" (default)
        permeabilityModelType = conductivity
        Ks = Ks_1
        retentionModel = vanGenuchten
        alpha = alpha_1
        n = n_1
        theta_r = thetar_1
    axi1: AxialSymmetry (default)
    nf1: NoFlow (default)
    gr1: Gravity | GravityType = Elevation
    init1: init "Initial Values 1" (default) | InitType = p; p = pIF; Hp = -(z+1.2)
    usporous2: UnsaturatedPorousMedium on domains 2, 4 | storageModelType = userdef; Sp = Sp_2
      fluid1: FluidPorousMedium "Fluid 1" (default)
        fluid = dommat
        fluidType = compressible
        gasConstantType = specificGC
        Constitutiverelation = newtonian
        nonNewtonianModels = powerLaw
        gamma_ref = 1[1/s]
        gamma_lowlimit = 0.01[1/s]
        alpha = 1
        C = 4
        Twlf = 293.15[K]
        C1wlf = 8.86
        C2wlf = 51.6[K]
        T0 = 293.15[K]
        alphaT = 1
        shift_temperature = dl.Tref
      pm1: PorousMatrixPorousMedium "Porous Matrix 1" (default)
        permeabilityModelType = conductivity
        Ks = Ks_2
        alpha = alpha_2
        n = n_2
        theta_r = thetar_2
    init2: init "Initial Values 2" on domains 2, 4 | InitType = Hp; Hp = -(z+1.2)-0.2*(z+0.4)
    ph1: PressureHead on boundaries 5 | Hp0 = Hp0
    pl1: PerviousLayer on boundaries 2, 8 | Hb = -2; Rb = 1/5[d]
    init3: init "Initial Values 3" on domains 1, 3 | InitType = Hp; p = pIF; Hp = -(z+1.2)
    init4: init "Initial Values 4" on domains 1-4 | InitType = p; p = pIF; Hp = -(z+1.2)
  tds: DilutedSpeciesInPorousMedia "Transport of Diluted Species in Porous Media" on all domains
    dependent variable c_a = {c_a, c_asx, c_asn}
    porous1: PorousMedium (default)
      fluid1: FluidPorousMedium "Fluid 1" (default)
        fluid = dommat
        DiffusionCoefficientSource = mat
        tauF = {1, 1, 1}
        FluidDiffusivityModelType = MillingtonAndQuirkModel
        MobilityModel = NernstEinstein
        ume = 
          {1e-13[s*mol/kg], 0, 0, 0, 1e-13[s*mol/kg], 0, 0, 0, 1e-13[s*mol/kg]}
          {1e-13[s*mol/kg], 0, 0, 0, 1e-13[s*mol/kg], 0, 0, 0, 1e-13[s*mol/kg]}
          {1e-13[s*mol/kg], 0, 0, 0, 1e-13[s*mol/kg], 0, 0, 0, 1e-13[s*mol/kg]}
        epsilonr = 80
        DF_c_a = 1e-9[m^2/s]
        Dchem_c_a = 1e-9[m^2/s]
        DF_c_asx = 1e-9[m^2/s]
        Dchem_c_asx = 1e-9[m^2/s]
        DF_c_asn = 1e-9[m^2/s]
        Dchem_c_asn = 1e-9[m^2/s]
      pm1: PorousMatrixPorousMedium "Porous Matrix 1" (default) | solid = dommat; rhob = 800[kg/m^3]; rhope = 1000[kg/m^3]
    axi1: AxialSymmetry (default)
    nflx1: NoFlux (default)
    init1: init "Initial Values 1" (default) | initc = {0, 0, 0}
    usporous1: UnsaturatedPorousMedium on all domains
      liquid1: LiquidUnsaturatedPorousMedium "Liquid 1" (default)
        SaturationType = LiquidVolumeFraction
        theta_l = dl.theta_l
        FluidFractionTimeChange = TimeChangeInPressureHead
        Cm = dl.Cm
        dHpdt_src = root.comp1.dl.dHpdt
        u_src = root.comp1.dl.u
        DL_c_a = Dl
        DL_c_asx = Dl
        DL_c_asn = Dl
      gas1: GasUnsaturatedPorousMedium "Gas 1" (default) | kG = {0, 0, 0}; DG_c_a = 0; DG_c_asx = 0; DG_c_asn = 0
      pm1: PorousMatrixPorousMedium "Porous Matrix 1" (default)
      ads1: Adsorptions "Adsorption 1" (disabled) on all domains
        species = {1, 1, 1}
        SorptionType = UserDefined
        cP = {kp_a*c_a, kp_asx*c_asx, kp_asn*c_asn}
      disp1: Dispersion on all domains
        DispersionTensor = Dispersivity
        DispersivityModel = TransverseIsotropic
        alpha = {alphar, 0, alphaz}
    reac1: Reactions (disabled) on all domains
      R_c_a = dl.theta_l*(-r_1-r_3)
      R_c_asx = dl.theta_l*(r_1-r_2-r_4)
      R_c_asn = dl.theta_l*(r_2-r_5)
    out1: Outflow on boundaries 2, 8, 12, 13
    conc1: Concentration on boundaries 5 | species = {1, 1, 1}; c0 = {c0, 0, 0}
    vola1: Volatilization (disabled) on boundaries 6, 11 | hc = Dg/d_s; species = {1, 0, 1}
    init3: init "Initial Values 3" on all domains | initc = {Aldi, Sulfoxide, Sulfone}
    usporous2: UnsaturatedPorousMedium (disabled) on all domains
      liquid1: LiquidUnsaturatedPorousMedium "Liquid 1" (default)
        SaturationType = LiquidVolumeFraction
        theta_l = ratio
        FluidFractionTimeChange = TimeChangeInPressureHead
        Cm = dl.Cm
        dHpdt_src = root.comp1.dl.dHpdt
        u_src = root.comp1.dl.u
        DL_c_a = Dl
        DL_c_asx = Dl
        DL_c_asn = Dl
      gas1: GasUnsaturatedPorousMedium "Gas 1" (default)
        kG = {kg_a, 0, kg_asn}
        DG_c_a = Dg
        DG_c_asx = Dg
        DG_c_asn = Dg
      pm1: PorousMatrixPorousMedium "Porous Matrix 1" (default)
      ads1: Adsorptions "Adsorption 1" (disabled) on all domains
        species = {1, 1, 1}
        SorptionType = UserDefined
        cP = {kp_a*c_a, kp_asx*c_asx, kp_asn*c_asn}
      disp1: Dispersion on all domains
        DispersionTensor = Dispersivity
        DispersivityModel = TransverseIsotropic
        alpha = {alphar, 0, alphaz}

Mesh
  mesh1 "Mesh 1"
    size: MeshSizeDefault | hauto = 1
    map1: Map "Mapped 1" on remaining entities
      size1: Size on domains 2 | hmax = 0.02; custom = on

Studies
  std2 "Study 2"
    time: Transient "Time Dependent" | tunit = fs; tlist = range(0,1,1); solve for = {dl, tds}

Solver configurations
  sol2 "Solution 2" (study std2)
    v1: Variables "Dependent Variables 1"
    t1: Time "Time-Dependent Solver 1" | tstepsbdf = strict
      fc1: FullyCoupled
      d1: Direct "Direct, pressure (dl)"

Datasets
  dset2: Solution on domains 1, 2 | solution = sol2
  rev1: Revolve2D "Revolution 2D" | data = dset2; startangle = -90; revangle = 225

Plots
  pg7: PlotGroup1D "1D Plot Group 7" | data = dset2
    lngr1: LineGraph on boundaries 1, 3 | expr = c_asx; unit = M
  pg2: PlotGroup3D "Pressure Head, 3D (dl)" | data = rev1
    surf1: Surface | expr = p
    con1: Contour | expr = dl.Hp; descr = Pressure head; contourlabels = on
  pg3: PlotGroup2D "Effective Saturation (dl)" | data = dset2; dataisaxisym = on
    con1: Contour | expr = dl.Se; contourtype = filled
    arws1: ArrowSurface | expr = {dl.u, dl.w}
  pg4: PlotGroup2D "Concentration, aldicarb" | data = dset2
    surf1: Surface | expr = c_a
  pg5: PlotGroup2D "Concentration, aldicarb sulfoxide" | data = dset2
    surf1: Surface | expr = c_asx; descr = Molar concentration, c_asx
  pg6: PlotGroup2D "pressure" | data = dset2; dataisaxisym = on
    con1: Contour | expr = p; contourtype = filled
    arws1: ArrowSurface | expr = {dl.u, dl.w}

Exports
  data1: Data
    data = dset2
    expr = {c_a, Oxime, c_asx, Sulfoxide_ox, c_asn, Sulfone_ox, p, dl.theta_l, time}
    unit = {mol/L, mol/L, mol/L, mol/L, mol/L, mol/L, Pa, 1, 1}
    descr = {Aldi, Oxime, Sulfoxide, Sulfoxide_ox, Sulfone, Sulfone_ox, Pressure, Liquid volume fraction, Function defined variable}
    filename = final.txt