// COMSOL Multiphysics 6.4.0.343 model "calDoloGems.mph"
// Outline of the model tree

Functions
  int1: Interpolation
    funcnametable = {int1, 1}
    source = file
    filename = /volatile/home/al274877/PICCTS/CalDolo/ic.txt
    defvars = on
    filecolumns = 27
    columnKeys = {col1, col2, col3, col4, col5, col6, col7, col8, col9, col10, col11, col12, col13, col14, col15, col16, col17, col18, col19, col20, col21, col22, col23, col24, col25, col26, col27}
    columnType = {col1, arg, col2, value, col3, value, col4, value, col5, value, col6, value, col7, value, col8, value, col9, value, col10, value, col11, value, col12, value, col13, value, col14, value, col15, value, col16, value, col17, value, col18, value, col19, value, col20, value, col21, value, col22, value, col23, value, col24, value, col25, value, col26, value, col27, value}
    funcnames = {col1, fff, col2, Ca_CO3_sli, col3, Ca_HCO3_plusi, col4, Caplusdi, col5, CaOHplusi, col6, Mg_CO3_sli, col7, Mg_HCO3_plusi, col8, Mgplusdi, col9, MgOHplusi, col10, CO2sli, col11, CO3moinsdi, col12, HCO3moinsi, col13, CH4sli, col14, ClO4moinsi, col15, Clmoinsi, col16, H2sli, col17, O2sli, col18, OHmoinsi, col19, Hplusi, col20, H2Osli, col21, CO2i, col22, CH4i, col23, H2i, col24, O2i, col25, Cali, col26, DismoinsDoli, col27, Sni}
    fununit = {mol/L, mol/L, mol/L, mol/L, mol/L, mol/L, mol/L, mol/L, mol/L, mol/L, mol/L, mol/L, mol/L, mol/L, mol/L, mol/L, mol/L, mol/L, mol/L, mol/L, mol/L, mol/L, mol/L, mol/L, mol/L, mol/L}
    argunit = m
    plotfuncname = all

Geometry
  geom1 "Geometry 1" (1D, length unit m)
    i1: Interval | coord = {0, 0.5}
    fin: Finalize "Form Union"

Physics
  tds: DilutedSpeciesInPorousMedia "Transport of Diluted Species in Porous Media" on all domains
    dependent variable Ca_CO3_sl = {Ca_CO3_sl, Ca_HCO3_plus, Caplusd, CaOHplus, Mg_CO3_sl, Mg_HCO3_plus, Mgplusd, MgOHplus, CO2sl, CO3moinsd, HCO3moins, CH4sl, ClO4moins, Clmoins, H2sl, O2sl, OHmoins, Hplus, H2Osl, CO2, CH4, H2, O2}
    porous1: PorousMedium (default)
      fluid1: FluidPorousMedium "Fluid 1" (default)
        u = {9.375e-6, 0, 0}
        ume = 
          {1e-13[s*mol/kg], 0, 0, 0, 1e-13[s*mol/kg], 0, 0, 0, 1e-13[s*mol/kg]}
          {1e-13[s*mol/kg], 0, 0, 0, 1e-13[s*mol/kg], 0, 0, 0, 1e-13[s*mol/kg]}
          {1e-13[s*mol/kg], 0, 0, 0, 1e-13[s*mol/kg], 0, 0, 0, 1e-13[s*mol/kg]}
          {1e-13[s*mol/kg], 0, 0, 0, 1e-13[s*mol/kg], 0, 0, 0, 1e-13[s*mol/kg]}
          {1e-13[s*mol/kg], 0, 0, 0, 1e-13[s*mol/kg], 0, 0, 0, 1e-13[s*mol/kg]}
          {1e-13[s*mol/kg], 0, 0, 0, 1e-13[s*mol/kg], 0, 0, 0, 1e-13[s*mol/kg]}
          {1e-13[s*mol/kg], 0, 0, 0, 1e-13[s*mol/kg], 0, 0, 0, 1e-13[s*mol/kg]}
          {1e-13[s*mol/kg], 0, 0, 0, 1e-13[s*mol/kg], 0, 0, 0, 1e-13[s*mol/kg]}
          {1e-13[s*mol/kg], 0, 0, 0, 1e-13[s*mol/kg], 0, 0, 0, 1e-13[s*mol/kg]}
          {1e-13[s*mol/kg], 0, 0, 0, 1e-13[s*mol/kg], 0, 0, 0, 1e-13[s*mol/kg]}
          {1e-13[s*mol/kg], 0, 0, 0, 1e-13[s*mol/kg], 0, 0, 0, 1e-13[s*mol/kg]}
          {1e-13[s*mol/kg], 0, 0, 0, 1e-13[s*mol/kg], 0, 0, 0, 1e-13[s*mol/kg]}
          {1e-13[s*mol/kg], 0, 0, 0, 1e-13[s*mol/kg], 0, 0, 0, 1e-13[s*mol/kg]}
          {1e-13[s*mol/kg], 0, 0, 0, 1e-13[s*mol/kg], 0, 0, 0, 1e-13[s*mol/kg]}
          {1e-13[s*mol/kg], 0, 0, 0, 1e-13[s*mol/kg], 0, 0, 0, 1e-13[s*mol/kg]}
          {1e-13[s*mol/kg], 0, 0, 0, 1e-13[s*mol/kg], 0, 0, 0, 1e-13[s*mol/kg]}
          {1e-13[s*mol/kg], 0, 0, 0, 1e-13[s*mol/kg], 0, 0, 0, 1e-13[s*mol/kg]}
          {1e-13[s*mol/kg], 0, 0, 0, 1e-13[s*mol/kg], 0, 0, 0, 1e-13[s*mol/kg]}
          {1e-13[s*mol/kg], 0, 0, 0, 1e-13[s*mol/kg], 0, 0, 0, 1e-13[s*mol/kg]}
          {1e-13[s*mol/kg], 0, 0, 0, 1e-13[s*mol/kg], 0, 0, 0, 1e-13[s*mol/kg]}
          {1e-13[s*mol/kg], 0, 0, 0, 1e-13[s*mol/kg], 0, 0, 0, 1e-13[s*mol/kg]}
          {1e-13[s*mol/kg], 0, 0, 0, 1e-13[s*mol/kg], 0, 0, 0, 1e-13[s*mol/kg]}
          {1e-13[s*mol/kg], 0, 0, 0, 1e-13[s*mol/kg], 0, 0, 0, 1e-13[s*mol/kg]}
        epsilonr = 80
        DF_Ca_HCO3_plus = 0 [m^2/s]
        DF_Caplusd = 0 [m^2/s]
        DF_CaOHplus = 0 [m^2/s]
        DF_Mg_HCO3_plus = 0 [m^2/s]
        DF_Mgplusd = 0 [m^2/s]
        DF_MgOHplus = 0 [m^2/s]
        DF_CO3moinsd = 0 [m^2/s]
        DF_HCO3moins = 0 [m^2/s]
        DF_ClO4moins = 0 [m^2/s]
        DF_Clmoins = 0 [m^2/s]
        DF_OHmoins = 0 [m^2/s]
        DF_Hplus = 0 [m^2/s]
        DF_Ca_CO3_sl = 0 [m^2/s]
        DF_Mg_CO3_sl = 0 [m^2/s]
        DF_CO2sl = 0 [m^2/s]
        DF_CH4sl = 0 [m^2/s]
        DF_H2sl = 0 [m^2/s]
        DF_O2sl = 0 [m^2/s]
        DF_H2Osl = 0 [m^2/s]
        DF_CO2 = 0 [m^2/s]
        DF_CH4 = 0 [m^2/s]
        DF_H2 = 0 [m^2/s]
        DF_O2 = 0 [m^2/s]
        DF_c1 = {{1e-9[m^2/s]}, {0}, {0}, {0}, {1e-9[m^2/s]}, {0}, {0}, {0}, {1e-9[m^2/s]}}
        Dchem_c1 = {{1e-9[m^2/s]}, {0}, {0}, {0}, {1e-9[m^2/s]}, {0}, {0}, {0}, {1e-9[m^2/s]}}
        DF_c2 = {{1e-9[m^2/s]}, {0}, {0}, {0}, {1e-9[m^2/s]}, {0}, {0}, {0}, {1e-9[m^2/s]}}
        Dchem_c2 = {{1e-9[m^2/s]}, {0}, {0}, {0}, {1e-9[m^2/s]}, {0}, {0}, {0}, {1e-9[m^2/s]}}
        DF_c3 = {{1e-9[m^2/s]}, {0}, {0}, {0}, {1e-9[m^2/s]}, {0}, {0}, {0}, {1e-9[m^2/s]}}
        Dchem_c3 = {{1e-9[m^2/s]}, {0}, {0}, {0}, {1e-9[m^2/s]}, {0}, {0}, {0}, {1e-9[m^2/s]}}
        DF_c4 = {{1e-9[m^2/s]}, {0}, {0}, {0}, {1e-9[m^2/s]}, {0}, {0}, {0}, {1e-9[m^2/s]}}
        Dchem_c4 = {{1e-9[m^2/s]}, {0}, {0}, {0}, {1e-9[m^2/s]}, {0}, {0}, {0}, {1e-9[m^2/s]}}
        DF_c5 = {{1e-9[m^2/s]}, {0}, {0}, {0}, {1e-9[m^2/s]}, {0}, {0}, {0}, {1e-9[m^2/s]}}
        Dchem_c5 = {{1e-9[m^2/s]}, {0}, {0}, {0}, {1e-9[m^2/s]}, {0}, {0}, {0}, {1e-9[m^2/s]}}
        DF_c6 = {{1e-9[m^2/s]}, {0}, {0}, {0}, {1e-9[m^2/s]}, {0}, {0}, {0}, {1e-9[m^2/s]}}
        Dchem_c6 = {{1e-9[m^2/s]}, {0}, {0}, {0}, {1e-9[m^2/s]}, {0}, {0}, {0}, {1e-9[m^2/s]}}
        DF_c7 = {{1e-9[m^2/s]}, {0}, {0}, {0}, {1e-9[m^2/s]}, {0}, {0}, {0}, {1e-9[m^2/s]}}
        Dchem_c7 = {{1e-9[m^2/s]}, {0}, {0}, {0}, {1e-9[m^2/s]}, {0}, {0}, {0}, {1e-9[m^2/s]}}
        DF_c8 = {{1e-9[m^2/s]}, {0}, {0}, {0}, {1e-9[m^2/s]}, {0}, {0}, {0}, {1e-9[m^2/s]}}
        Dchem_c8 = {{1e-9[m^2/s]}, {0}, {0}, {0}, {1e-9[m^2/s]}, {0}, {0}, {0}, {1e-9[m^2/s]}}
        DF_c9 = {{1e-9[m^2/s]}, {0}, {0}, {0}, {1e-9[m^2/s]}, {0}, {0}, {0}, {1e-9[m^2/s]}}
        Dchem_c9 = {{1e-9[m^2/s]}, {0}, {0}, {0}, {1e-9[m^2/s]}, {0}, {0}, {0}, {1e-9[m^2/s]}}
        DF_c10 = {{1e-9[m^2/s]}, {0}, {0}, {0}, {1e-9[m^2/s]}, {0}, {0}, {0}, {1e-9[m^2/s]}}
        Dchem_c10 = {{1e-9[m^2/s]}, {0}, {0}, {0}, {1e-9[m^2/s]}, {0}, {0}, {0}, {1e-9[m^2/s]}}
        DF_c11 = {{1e-9[m^2/s]}, {0}, {0}, {0}, {1e-9[m^2/s]}, {0}, {0}, {0}, {1e-9[m^2/s]}}
        Dchem_c11 = {{1e-9[m^2/s]}, {0}, {0}, {0}, {1e-9[m^2/s]}, {0}, {0}, {0}, {1e-9[m^2/s]}}
        DF_c12 = {{1e-9[m^2/s]}, {0}, {0}, {0}, {1e-9[m^2/s]}, {0}, {0}, {0}, {1e-9[m^2/s]}}
        Dchem_c12 = {{1e-9[m^2/s]}, {0}, {0}, {0}, {1e-9[m^2/s]}, {0}, {0}, {0}, {1e-9[m^2/s]}}
        DF_c13 = {{1e-9[m^2/s]}, {0}, {0}, {0}, {1e-9[m^2/s]}, {0}, {0}, {0}, {1e-9[m^2/s]}}
        Dchem_c13 = {{1e-9[m^2/s]}, {0}, {0}, {0}, {1e-9[m^2/s]}, {0}, {0}, {0}, {1e-9[m^2/s]}}
        DF_c14 = {{1e-9[m^2/s]}, {0}, {0}, {0}, {1e-9[m^2/s]}, {0}, {0}, {0}, {1e-9[m^2/s]}}
        Dchem_c14 = {{1e-9[m^2/s]}, {0}, {0}, {0}, {1e-9[m^2/s]}, {0}, {0}, {0}, {1e-9[m^2/s]}}
        DF_c15 = {{1e-9[m^2/s]}, {0}, {0}, {0}, {1e-9[m^2/s]}, {0}, {0}, {0}, {1e-9[m^2/s]}}
        Dchem_c15 = {{1e-9[m^2/s]}, {0}, {0}, {0}, {1e-9[m^2/s]}, {0}, {0}, {0}, {1e-9[m^2/s]}}
        DF_c16 = {{1e-9[m^2/s]}, {0}, {0}, {0}, {1e-9[m^2/s]}, {0}, {0}, {0}, {1e-9[m^2/s]}}
        Dchem_c16 = {{1e-9[m^2/s]}, {0}, {0}, {0}, {1e-9[m^2/s]}, {0}, {0}, {0}, {1e-9[m^2/s]}}
        DF_c17 = {{1e-9[m^2/s]}, {0}, {0}, {0}, {1e-9[m^2/s]}, {0}, {0}, {0}, {1e-9[m^2/s]}}
        Dchem_c17 = {{1e-9[m^2/s]}, {0}, {0}, {0}, {1e-9[m^2/s]}, {0}, {0}, {0}, {1e-9[m^2/s]}}
        DF_c18 = {{1e-9[m^2/s]}, {0}, {0}, {0}, {1e-9[m^2/s]}, {0}, {0}, {0}, {1e-9[m^2/s]}}
        Dchem_c18 = {{1e-9[m^2/s]}, {0}, {0}, {0}, {1e-9[m^2/s]}, {0}, {0}, {0}, {1e-9[m^2/s]}}
        DF_c19 = {{1e-9[m^2/s]}, {0}, {0}, {0}, {1e-9[m^2/s]}, {0}, {0}, {0}, {1e-9[m^2/s]}}
        Dchem_c19 = {{1e-9[m^2/s]}, {0}, {0}, {0}, {1e-9[m^2/s]}, {0}, {0}, {0}, {1e-9[m^2/s]}}
        DF_c20 = {{1e-9[m^2/s]}, {0}, {0}, {0}, {1e-9[m^2/s]}, {0}, {0}, {0}, {1e-9[m^2/s]}}
        Dchem_c20 = {{1e-9[m^2/s]}, {0}, {0}, {0}, {1e-9[m^2/s]}, {0}, {0}, {0}, {1e-9[m^2/s]}}
        DF_c21 = {{1e-9[m^2/s]}, {0}, {0}, {0}, {1e-9[m^2/s]}, {0}, {0}, {0}, {1e-9[m^2/s]}}
        Dchem_c21 = {{1e-9[m^2/s]}, {0}, {0}, {0}, {1e-9[m^2/s]}, {0}, {0}, {0}, {1e-9[m^2/s]}}
        DF_c22 = {{1e-9[m^2/s]}, {0}, {0}, {0}, {1e-9[m^2/s]}, {0}, {0}, {0}, {1e-9[m^2/s]}}
        Dchem_c22 = {{1e-9[m^2/s]}, {0}, {0}, {0}, {1e-9[m^2/s]}, {0}, {0}, {0}, {1e-9[m^2/s]}}
        DF_c23 = {{1e-9[m^2/s]}, {0}, {0}, {0}, {1e-9[m^2/s]}, {0}, {0}, {0}, {1e-9[m^2/s]}}
        Dchem_c23 = {{1e-9[m^2/s]}, {0}, {0}, {0}, {1e-9[m^2/s]}, {0}, {0}, {0}, {1e-9[m^2/s]}}
        DF_c24 = {{1e-9[m^2/s]}, {0}, {0}, {0}, {1e-9[m^2/s]}, {0}, {0}, {0}, {1e-9[m^2/s]}}
        Dchem_c24 = {{1e-9[m^2/s]}, {0}, {0}, {0}, {1e-9[m^2/s]}, {0}, {0}, {0}, {1e-9[m^2/s]}}
        DF_c25 = {{1e-9[m^2/s]}, {0}, {0}, {0}, {1e-9[m^2/s]}, {0}, {0}, {0}, {1e-9[m^2/s]}}
        Dchem_c25 = {{1e-9[m^2/s]}, {0}, {0}, {0}, {1e-9[m^2/s]}, {0}, {0}, {0}, {1e-9[m^2/s]}}
        DF_c26 = {{1e-9[m^2/s]}, {0}, {0}, {0}, {1e-9[m^2/s]}, {0}, {0}, {0}, {1e-9[m^2/s]}}
        Dchem_c26 = {{1e-9[m^2/s]}, {0}, {0}, {0}, {1e-9[m^2/s]}, {0}, {0}, {0}, {1e-9[m^2/s]}}
        DF_c27 = {{1e-9[m^2/s]}, {0}, {0}, {0}, {1e-9[m^2/s]}, {0}, {0}, {0}, {1e-9[m^2/s]}}
        Dchem_c27 = {{1e-9[m^2/s]}, {0}, {0}, {0}, {1e-9[m^2/s]}, {0}, {0}, {0}, {1e-9[m^2/s]}}
        DF_c28 = {{1e-9[m^2/s]}, {0}, {0}, {0}, {1e-9[m^2/s]}, {0}, {0}, {0}, {1e-9[m^2/s]}}
        Dchem_c28 = {{1e-9[m^2/s]}, {0}, {0}, {0}, {1e-9[m^2/s]}, {0}, {0}, {0}, {1e-9[m^2/s]}}
        DF_c29 = {{1e-9[m^2/s]}, {0}, {0}, {0}, {1e-9[m^2/s]}, {0}, {0}, {0}, {1e-9[m^2/s]}}
        Dchem_c29 = {{1e-9[m^2/s]}, {0}, {0}, {0}, {1e-9[m^2/s]}, {0}, {0}, {0}, {1e-9[m^2/s]}}
        DF_c30 = {{1e-9[m^2/s]}, {0}, {0}, {0}, {1e-9[m^2/s]}, {0}, {0}, {0}, {1e-9[m^2/s]}}
        Dchem_c30 = {{1e-9[m^2/s]}, {0}, {0}, {0}, {1e-9[m^2/s]}, {0}, {0}, {0}, {1e-9[m^2/s]}}
        DF_c31 = {{1e-9[m^2/s]}, {0}, {0}, {0}, {1e-9[m^2/s]}, {0}, {0}, {0}, {1e-9[m^2/s]}}
        Dchem_c31 = {{1e-9[m^2/s]}, {0}, {0}, {0}, {1e-9[m^2/s]}, {0}, {0}, {0}, {1e-9[m^2/s]}}
      pm1: PorousMatrixPorousMedium "Porous Matrix 1" (default) | poro_mat = userdef; poro = 1
      disp1: Dispersion on all domains | DispersionTensor = Dispersivity; alphaL = 0.0067
    nflx1: NoFlux (default)
    init1: init "Initial Values 1" (default)
      initc = {0, 0, 0.3405, 0, 0, 0, 1e-6, 0, 0, 0.3405, 0, 0, 0, 1e-6, 0, 0, 0, 0, 55.5095948288231e3, 0, 0, 0, 0}
    conc1: Concentration on boundaries 1
      species = {1, 1, 1, 1, 1, 1, 1, 1, 1, 1, 1, 1, 1, 1, 1, 1, 1, 1, 1, 1, 1, 1, 1}
      c0 = {3.49121661057e-14, 7.26344385248e-13, 9.99998825653e-06, 1.0982209305e-11, 3.97584697498e-09, 1.33201925781e-07, 1.99995182446/2, 4.80383669043e-05, 1.9360179363e-06, 4.03182994984e-09, 7.92277169973e-06, 0, 7.22597253838e-26, 2, 0, 0.0100000000039, 9.20802996541e-05, 0.000128190667316, 55.5083731906404e3, 0, 0, 0, 0}
    init2: init "Initial Values 2" on all domains
      initc = {Ca_CO3_sli, Ca_HCO3_plusi, Caplusdi, CaOHplusi, Mg_CO3_sli, Mg_HCO3_plusi, Mgplusdi, MgOHplusi, CO2sli, CO3moinsdi, HCO3moinsi, CH4sli, ClO4moinsi, Clmoinsi, H2sli, O2sli, OHmoinsi, Hplusi, H2Osli, CO2i, CH4i, H2i, O2i}
    conc2: Concentration (disabled) on boundaries 1
    porous2: PorousMedium (disabled) on all domains | matList = dommat
      fluid1: FluidPorousMedium "Fluid 1" (default)
        u = {9.375e-6, 0, 0}
        DF_Ca_CO3_sl = 0 [m^2/s]
        DF_Ca_HCO3_plus = 0 [m^2/s]
        DF_Caplusd = 0 [m^2/s]
        DF_CaOHplus = 0 [m^2/s]
        DF_Mg_CO3_sl = 0 [m^2/s]
        DF_Mg_HCO3_plus = 0 [m^2/s]
        DF_Mgplusd = 0 [m^2/s]
        DF_MgOHplus = 0 [m^2/s]
        DF_CO2sl = 0 [m^2/s]
        DF_CO3moinsd = 0 [m^2/s]
        DF_HCO3moins = 0 [m^2/s]
        DF_CH4sl = 0 [m^2/s]
        DF_ClO4moins = 0 [m^2/s]
        DF_Clmoins = 0 [m^2/s]
        DF_H2sl = 0 [m^2/s]
        DF_O2sl = 0 [m^2/s]
        DF_OHmoins = 0 [m^2/s]
        DF_Hplus = 0 [m^2/s]
        DF_H2Osl = 0 [m^2/s]
        DF_CO2 = 0 [m^2/s]
        DF_CH4 = 0 [m^2/s]
        DF_H2 = 0 [m^2/s]
        DF_O2 = 0 [m^2/s]
        ume = 
          {1e-13[s*mol/kg], 0, 0, 0, 1e-13[s*mol/kg], 0, 0, 0, 1e-13[s*mol/kg]}
          {1e-13[s*mol/kg], 0, 0, 0, 1e-13[s*mol/kg], 0, 0, 0, 1e-13[s*mol/kg]}
          {1e-13[s*mol/kg], 0, 0, 0, 1e-13[s*mol/kg], 0, 0, 0, 1e-13[s*mol/kg]}
          {1e-13[s*mol/kg], 0, 0, 0, 1e-13[s*mol/kg], 0, 0, 0, 1e-13[s*mol/kg]}
          {1e-13[s*mol/kg], 0, 0, 0, 1e-13[s*mol/kg], 0, 0, 0, 1e-13[s*mol/kg]}
          {1e-13[s*mol/kg], 0, 0, 0, 1e-13[s*mol/kg], 0, 0, 0, 1e-13[s*mol/kg]}
          {1e-13[s*mol/kg], 0, 0, 0, 1e-13[s*mol/kg], 0, 0, 0, 1e-13[s*mol/kg]}
          {1e-13[s*mol/kg], 0, 0, 0, 1e-13[s*mol/kg], 0, 0, 0, 1e-13[s*mol/kg]}
          {1e-13[s*mol/kg], 0, 0, 0, 1e-13[s*mol/kg], 0, 0, 0, 1e-13[s*mol/kg]}
          {1e-13[s*mol/kg], 0, 0, 0, 1e-13[s*mol/kg], 0, 0, 0, 1e-13[s*mol/kg]}
          {1e-13[s*mol/kg], 0, 0, 0, 1e-13[s*mol/kg], 0, 0, 0, 1e-13[s*mol/kg]}
          {1e-13[s*mol/kg], 0, 0, 0, 1e-13[s*mol/kg], 0, 0, 0, 1e-13[s*mol/kg]}
          {1e-13[s*mol/kg], 0, 0, 0, 1e-13[s*mol/kg], 0, 0, 0, 1e-13[s*mol/kg]}
          {1e-13[s*mol/kg], 0, 0, 0, 1e-13[s*mol/kg], 0, 0, 0, 1e-13[s*mol/kg]}
          {1e-13[s*mol/kg], 0, 0, 0, 1e-13[s*mol/kg], 0, 0, 0, 1e-13[s*mol/kg]}
          {1e-13[s*mol/kg], 0, 0, 0, 1e-13[s*mol/kg], 0, 0, 0, 1e-13[s*mol/kg]}
          {1e-13[s*mol/kg], 0, 0, 0, 1e-13[s*mol/kg], 0, 0, 0, 1e-13[s*mol/kg]}
          {1e-13[s*mol/kg], 0, 0, 0, 1e-13[s*mol/kg], 0, 0, 0, 1e-13[s*mol/kg]}
          {1e-13[s*mol/kg], 0, 0, 0, 1e-13[s*mol/kg], 0, 0, 0, 1e-13[s*mol/kg]}
          {1e-13[s*mol/kg], 0, 0, 0, 1e-13[s*mol/kg], 0, 0, 0, 1e-13[s*mol/kg]}
          {1e-13[s*mol/kg], 0, 0, 0, 1e-13[s*mol/kg], 0, 0, 0, 1e-13[s*mol/kg]}
          {1e-13[s*mol/kg], 0, 0, 0, 1e-13[s*mol/kg], 0, 0, 0, 1e-13[s*mol/kg]}
          {1e-13[s*mol/kg], 0, 0, 0, 1e-13[s*mol/kg], 0, 0, 0, 1e-13[s*mol/kg]}
        epsilonr = 80
        DF_c1 = {{1e-9[m^2/s]}, {0}, {0}, {0}, {1e-9[m^2/s]}, {0}, {0}, {0}, {1e-9[m^2/s]}}
        Dchem_c1 = {{1e-9[m^2/s]}, {0}, {0}, {0}, {1e-9[m^2/s]}, {0}, {0}, {0}, {1e-9[m^2/s]}}
        DF_c2 = {{1e-9[m^2/s]}, {0}, {0}, {0}, {1e-9[m^2/s]}, {0}, {0}, {0}, {1e-9[m^2/s]}}
        Dchem_c2 = {{1e-9[m^2/s]}, {0}, {0}, {0}, {1e-9[m^2/s]}, {0}, {0}, {0}, {1e-9[m^2/s]}}
        DF_c3 = {{1e-9[m^2/s]}, {0}, {0}, {0}, {1e-9[m^2/s]}, {0}, {0}, {0}, {1e-9[m^2/s]}}
        Dchem_c3 = {{1e-9[m^2/s]}, {0}, {0}, {0}, {1e-9[m^2/s]}, {0}, {0}, {0}, {1e-9[m^2/s]}}
        DF_c4 = {{1e-9[m^2/s]}, {0}, {0}, {0}, {1e-9[m^2/s]}, {0}, {0}, {0}, {1e-9[m^2/s]}}
        Dchem_c4 = {{1e-9[m^2/s]}, {0}, {0}, {0}, {1e-9[m^2/s]}, {0}, {0}, {0}, {1e-9[m^2/s]}}
        DF_c5 = {{1e-9[m^2/s]}, {0}, {0}, {0}, {1e-9[m^2/s]}, {0}, {0}, {0}, {1e-9[m^2/s]}}
        Dchem_c5 = {{1e-9[m^2/s]}, {0}, {0}, {0}, {1e-9[m^2/s]}, {0}, {0}, {0}, {1e-9[m^2/s]}}
        DF_c6 = {{1e-9[m^2/s]}, {0}, {0}, {0}, {1e-9[m^2/s]}, {0}, {0}, {0}, {1e-9[m^2/s]}}
        Dchem_c6 = {{1e-9[m^2/s]}, {0}, {0}, {0}, {1e-9[m^2/s]}, {0}, {0}, {0}, {1e-9[m^2/s]}}
        DF_c7 = {{1e-9[m^2/s]}, {0}, {0}, {0}, {1e-9[m^2/s]}, {0}, {0}, {0}, {1e-9[m^2/s]}}
        Dchem_c7 = {{1e-9[m^2/s]}, {0}, {0}, {0}, {1e-9[m^2/s]}, {0}, {0}, {0}, {1e-9[m^2/s]}}
        DF_c8 = {{1e-9[m^2/s]}, {0}, {0}, {0}, {1e-9[m^2/s]}, {0}, {0}, {0}, {1e-9[m^2/s]}}
        Dchem_c8 = {{1e-9[m^2/s]}, {0}, {0}, {0}, {1e-9[m^2/s]}, {0}, {0}, {0}, {1e-9[m^2/s]}}
        DF_c9 = {{1e-9[m^2/s]}, {0}, {0}, {0}, {1e-9[m^2/s]}, {0}, {0}, {0}, {1e-9[m^2/s]}}
        Dchem_c9 = {{1e-9[m^2/s]}, {0}, {0}, {0}, {1e-9[m^2/s]}, {0}, {0}, {0}, {1e-9[m^2/s]}}
        DF_c10 = {{1e-9[m^2/s]}, {0}, {0}, {0}, {1e-9[m^2/s]}, {0}, {0}, {0}, {1e-9[m^2/s]}}
        Dchem_c10 = {{1e-9[m^2/s]}, {0}, {0}, {0}, {1e-9[m^2/s]}, {0}, {0}, {0}, {1e-9[m^2/s]}}
        DF_c11 = {{1e-9[m^2/s]}, {0}, {0}, {0}, {1e-9[m^2/s]}, {0}, {0}, {0}, {1e-9[m^2/s]}}
        Dchem_c11 = {{1e-9[m^2/s]}, {0}, {0}, {0}, {1e-9[m^2/s]}, {0}, {0}, {0}, {1e-9[m^2/s]}}
        DF_c12 = {{1e-9[m^2/s]}, {0}, {0}, {0}, {1e-9[m^2/s]}, {0}, {0}, {0}, {1e-9[m^2/s]}}
        Dchem_c12 = {{1e-9[m^2/s]}, {0}, {0}, {0}, {1e-9[m^2/s]}, {0}, {0}, {0}, {1e-9[m^2/s]}}
        DF_c13 = {{1e-9[m^2/s]}, {0}, {0}, {0}, {1e-9[m^2/s]}, {0}, {0}, {0}, {1e-9[m^2/s]}}
        Dchem_c13 = {{1e-9[m^2/s]}, {0}, {0}, {0}, {1e-9[m^2/s]}, {0}, {0}, {0}, {1e-9[m^2/s]}}
        DF_c14 = {{1e-9[m^2/s]}, {0}, {0}, {0}, {1e-9[m^2/s]}, {0}, {0}, {0}, {1e-9[m^2/s]}}
        Dchem_c14 = {{1e-9[m^2/s]}, {0}, {0}, {0}, {1e-9[m^2/s]}, {0}, {0}, {0}, {1e-9[m^2/s]}}
        DF_c15 = {{1e-9[m^2/s]}, {0}, {0}, {0}, {1e-9[m^2/s]}, {0}, {0}, {0}, {1e-9[m^2/s]}}
        Dchem_c15 = {{1e-9[m^2/s]}, {0}, {0}, {0}, {1e-9[m^2/s]}, {0}, {0}, {0}, {1e-9[m^2/s]}}
        DF_c16 = {{1e-9[m^2/s]}, {0}, {0}, {0}, {1e-9[m^2/s]}, {0}, {0}, {0}, {1e-9[m^2/s]}}
        Dchem_c16 = {{1e-9[m^2/s]}, {0}, {0}, {0}, {1e-9[m^2/s]}, {0}, {0}, {0}, {1e-9[m^2/s]}}
        DF_c17 = {{1e-9[m^2/s]}, {0}, {0}, {0}, {1e-9[m^2/s]}, {0}, {0}, {0}, {1e-9[m^2/s]}}
        Dchem_c17 = {{1e-9[m^2/s]}, {0}, {0}, {0}, {1e-9[m^2/s]}, {0}, {0}, {0}, {1e-9[m^2/s]}}
        DF_c18 = {{1e-9[m^2/s]}, {0}, {0}, {0}, {1e-9[m^2/s]}, {0}, {0}, {0}, {1e-9[m^2/s]}}
        Dchem_c18 = {{1e-9[m^2/s]}, {0}, {0}, {0}, {1e-9[m^2/s]}, {0}, {0}, {0}, {1e-9[m^2/s]}}
        DF_c19 = {{1e-9[m^2/s]}, {0}, {0}, {0}, {1e-9[m^2/s]}, {0}, {0}, {0}, {1e-9[m^2/s]}}
        Dchem_c19 = {{1e-9[m^2/s]}, {0}, {0}, {0}, {1e-9[m^2/s]}, {0}, {0}, {0}, {1e-9[m^2/s]}}
        DF_c20 = {{1e-9[m^2/s]}, {0}, {0}, {0}, {1e-9[m^2/s]}, {0}, {0}, {0}, {1e-9[m^2/s]}}
        Dchem_c20 = {{1e-9[m^2/s]}, {0}, {0}, {0}, {1e-9[m^2/s]}, {0}, {0}, {0}, {1e-9[m^2/s]}}
        DF_c21 = {{1e-9[m^2/s]}, {0}, {0}, {0}, {1e-9[m^2/s]}, {0}, {0}, {0}, {1e-9[m^2/s]}}
        Dchem_c21 = {{1e-9[m^2/s]}, {0}, {0}, {0}, {1e-9[m^2/s]}, {0}, {0}, {0}, {1e-9[m^2/s]}}
        DF_c22 = {{1e-9[m^2/s]}, {0}, {0}, {0}, {1e-9[m^2/s]}, {0}, {0}, {0}, {1e-9[m^2/s]}}
        Dchem_c22 = {{1e-9[m^2/s]}, {0}, {0}, {0}, {1e-9[m^2/s]}, {0}, {0}, {0}, {1e-9[m^2/s]}}
        DF_c23 = {{1e-9[m^2/s]}, {0}, {0}, {0}, {1e-9[m^2/s]}, {0}, {0}, {0}, {1e-9[m^2/s]}}
        Dchem_c23 = {{1e-9[m^2/s]}, {0}, {0}, {0}, {1e-9[m^2/s]}, {0}, {0}, {0}, {1e-9[m^2/s]}}
        DF_c24 = {{1e-9[m^2/s]}, {0}, {0}, {0}, {1e-9[m^2/s]}, {0}, {0}, {0}, {1e-9[m^2/s]}}
        Dchem_c24 = {{1e-9[m^2/s]}, {0}, {0}, {0}, {1e-9[m^2/s]}, {0}, {0}, {0}, {1e-9[m^2/s]}}
        DF_c25 = {{1e-9[m^2/s]}, {0}, {0}, {0}, {1e-9[m^2/s]}, {0}, {0}, {0}, {1e-9[m^2/s]}}
        Dchem_c25 = {{1e-9[m^2/s]}, {0}, {0}, {0}, {1e-9[m^2/s]}, {0}, {0}, {0}, {1e-9[m^2/s]}}
        DF_c26 = {{1e-9[m^2/s]}, {0}, {0}, {0}, {1e-9[m^2/s]}, {0}, {0}, {0}, {1e-9[m^2/s]}}
        Dchem_c26 = {{1e-9[m^2/s]}, {0}, {0}, {0}, {1e-9[m^2/s]}, {0}, {0}, {0}, {1e-9[m^2/s]}}
        DF_c27 = {{1e-9[m^2/s]}, {0}, {0}, {0}, {1e-9[m^2/s]}, {0}, {0}, {0}, {1e-9[m^2/s]}}
        Dchem_c27 = {{1e-9[m^2/s]}, {0}, {0}, {0}, {1e-9[m^2/s]}, {0}, {0}, {0}, {1e-9[m^2/s]}}
        DF_c28 = {{1e-9[m^2/s]}, {0}, {0}, {0}, {1e-9[m^2/s]}, {0}, {0}, {0}, {1e-9[m^2/s]}}
        Dchem_c28 = {{1e-9[m^2/s]}, {0}, {0}, {0}, {1e-9[m^2/s]}, {0}, {0}, {0}, {1e-9[m^2/s]}}
        DF_c29 = {{1e-9[m^2/s]}, {0}, {0}, {0}, {1e-9[m^2/s]}, {0}, {0}, {0}, {1e-9[m^2/s]}}
        Dchem_c29 = {{1e-9[m^2/s]}, {0}, {0}, {0}, {1e-9[m^2/s]}, {0}, {0}, {0}, {1e-9[m^2/s]}}
        DF_c30 = {{1e-9[m^2/s]}, {0}, {0}, {0}, {1e-9[m^2/s]}, {0}, {0}, {0}, {1e-9[m^2/s]}}
        Dchem_c30 = {{1e-9[m^2/s]}, {0}, {0}, {0}, {1e-9[m^2/s]}, {0}, {0}, {0}, {1e-9[m^2/s]}}
        DF_c31 = {{1e-9[m^2/s]}, {0}, {0}, {0}, {1e-9[m^2/s]}, {0}, {0}, {0}, {1e-9[m^2/s]}}
        Dchem_c31 = {{1e-9[m^2/s]}, {0}, {0}, {0}, {1e-9[m^2/s]}, {0}, {0}, {0}, {1e-9[m^2/s]}}
      pm1: PorousMatrixPorousMedium "Porous Matrix 1" (default) | poro_mat = userdef; poro = 1
      disp1: Dispersion on all domains | DispersionTensor = Dispersivity; alphaL = 0.0067

Mesh
  mesh1 "Mesh 1"
    size: MeshSizeDefault | hmax = 0.001; hauto = 1; custom = on
    edg1: Edge on remaining entities

Studies
  std1 "Study 1"
    time: Transient "Time Dependent" | tlist = range(0,21000,21000)

Solver configurations
  sol1 "Solution 1" (study std1)
    v1: Variables "Dependent Variables 1"
    t1: Time "Time-Dependent Solver 1"
      fc1: FullyCoupled
      d1: Direct "Direct, concentrations (tds)"

Datasets
  dset1: Solution | solution = sol1

Plots
  pg1: PlotGroup1D "1D Plot Group 1" | data = dset1
    lngr1: LineGraph on domains 1 | expr = Clmoins

Exports
  data1: Data
    data = dset1
    expr = {Ca_CO3_sl, Ca_HCO3_plus, Caplusd, CaOHplus, Mg_CO3_sl, Mg_HCO3_plus, Mgplusd, MgOHplus, CO2sl, CO3moinsd, HCO3moins, CH4sl, ClO4moins, Clmoins, H2sl, O2sl, OHmoins, Hplus, H2Osl, CO2, CH4, H2, O2, Cali, DismoinsDoli, Sni}
    unit = {mol/L, mol/L, mol/L, mol/L, mol/L, mol/L, mol/L, mol/L, mol/L, mol/L, mol/L, mol/L, mol/L, mol/L, mol/L, mol/L, mol/L, mol/L, mol/L, mol/L, mol/L, mol/L, mol/L, mol/L, mol/L, mol/L}
    descr = {Ca(CO3)@, Ca(HCO3)+, Ca+2, CaOH+, Mg(CO3)@, Mg(HCO3)+, Mg+2, MgOH+, CO2@, CO3-2, HCO3-, CH4@, ClO4-, Cl-, H2@, O2@, OH-, H+, H2O@, CO2, CH4, H2, O2, Cal, Dis-Dol, Sn}
    filename = ci.txt

Methods
  method1: CodeEditor
    public class method1 extends ApplicationMethod {
      public void execute() {
        model.result().export("data1").setIndex("expr", "Ca_CO3_sl", 0);
        model.result().export("data1").setIndex("unit", "mol/L", 0);
        model.result().export("data1").setIndex("descr", "Ca(CO3)@", 0);
        model.result().export("data1").setIndex("expr", "Ca_HCO3_plus", 1);
        model.result().export("data1").setIndex("unit", "mol/L", 1);
        model.result().export("data1").setIndex("descr", "Ca(HCO3)+", 1);
        model.result().export("data1").setIndex("expr", "Caplusd", 2);
        model.result().export("data1").setIndex("unit", "mol/L", 2);
        model.result().export("data1").setIndex("descr", "Ca+2", 2);
        model.result().export("data1").setIndex("expr", "CaOHplus", 3);
        model.result().export("data1").setIndex("unit", "mol/L", 3);
        model.result().export("data1").setIndex("descr", "CaOH+", 3);
        model.result().export("data1").setIndex("expr", "Mg_CO3_sl", 4);
        model.result().export("data1").setIndex("unit", "mol/L", 4);
        model.result().export("data1").setIndex("descr", "Mg(CO3)@", 4);
        model.result().export("data1").setIndex("expr", "Mg_HCO3_plus", 5);
        model.result().export("data1").setIndex("unit", "mol/L", 5);
        model.result().export("data1").setIndex("descr", "Mg(HCO3)+", 5);
        model.result().export("data1").setIndex("expr", "Mgplusd", 6);
        model.result().export("data1").setIndex("unit", "mol/L", 6);
        model.result().export("data1").setIndex("descr", "Mg+2", 6);
        model.result().export("data1").setIndex("expr", "MgOHplus", 7);
        model.result().export("data1").setIndex("unit", "mol/L", 7);
        model.result().export("data1").setIndex("descr", "MgOH+", 7);
        model.result().export("data1").setIndex("expr", "CO2sl", 8);
        model.result().export("data1").setIndex("unit", "mol/L", 8);
        model.result().export("data1").setIndex("descr", "CO2@", 8);
        model.result().export("data1").setIndex("expr", "CO3moinsd", 9);
        model.result().export("data1").setIndex("unit", "mol/L", 9);
        model.result().export("data1").setIndex("descr", "CO3-2", 9);
        model.result().export("data1").setIndex("expr", "HCO3moins", 10);
        model.result().export("data1").setIndex("unit", "mol/L", 10);
        model.result().export("data1").setIndex("descr", "HCO3-", 10);
        model.result().export("data1").setIndex("expr", "CH4sl", 11);
        model.result().export("data1").setIndex("unit", "mol/L", 11);
        model.result().export("data1").setIndex("descr", "CH4@", 11);
        model.result().export("data1").setIndex("expr", "ClO4moins", 12);
        model.result().export("data1").setIndex("unit", "mol/L", 12);
        model.result().export("data1").setIndex("descr", "ClO4-", 12);
        model.result().export("data1").setIndex("expr", "Clmoins", 13);
        model.result().export("data1").setIndex("unit", "mol/L", 13);
        model.result().export("data1").setIndex("descr", "Cl-", 13);
        model.result().export("data1").setIndex("expr", "H2sl", 14);
        model.result().export("data1").setIndex("unit", "mol/L", 14);
        model.result().export("data1").setIndex("descr", "H2@", 14);
        model.result().export("data1").setIndex("expr", "O2sl", 15);
        model.result().export("data1").setIndex("unit", "mol/L", 15);
        model.result().export("data1").setIndex("descr", "O2@", 15);
        model.result().export("data1").setIndex("expr", "OHmoins", 16);
        model.result().export("data1").setIndex("unit", "mol/L", 16);
        model.result().export("data1").setIndex("descr", "OH-", 16);
        model.result().export("data1").setIndex("expr", "Hplus", 17);
        model.result().export("data1").setIndex("unit", "mol/L", 17);
        model.result().export("data1").setIndex("descr", "H+", 17);
        model.result().export("data1").setIndex("expr", "H2Osl", 18);
        model.result().export("data1").setIndex("unit", "mol/L", 18);
        model.result().export("data1").setIndex("descr", "H2O@", 18);
        model.result().export("data1").setIndex("expr", "CO2", 19);
        model.result().export("data1").setIndex("unit", "mol/L", 19);
        model.result().export("data1").setIndex("descr", "CO2", 19);
        model.result().export("data1").setIndex("expr", "CH4", 20);
        model.result().export("data1").setIndex("unit", "mol/L", 20);
        model.result().export("data1").setIndex("descr", "CH4", 20);
        model.result().export("data1").setIndex("expr", "H2", 21);
        model.result().export("data1").setIndex("unit", "mol/L", 21);
        model.result().export("data1").setIndex("descr", "H2", 21);
        model.result().export("data1").setIndex("expr", "O2", 22);
        model.result().export("data1").setIndex("unit", "mol/L", 22);
        model.result().export("data1").setIndex("descr", "O2", 22);
        model.result().export("data1").setIndex("expr", "Cal", 23);
        model.result().export("data1").setIndex("unit", "mol/L", 23);
        model.result().export("data1").setIndex("descr", "Cal", 23);
        model.result().export("data1").setIndex("expr", "DismoinsDol", 24);
        model.result().export("data1").setIndex("unit", "mol/L", 24);
        model.result().export("data1").setIndex("descr", "Dis-Dol", 24);
        model.result().export("data1").setIndex("expr", "Sn", 25);
        model.result().export("data1").setIndex("unit", "mol/L", 25);
        model.result().export("data1").setIndex("descr", "Sn", 25);
        model.result().export("data1").setIndex("expr", "aq_eg", 26);
        model.result().export("data1").setIndex("unit", "mol/L", 26);
        model.result().export("data1").setIndex("descr", "aq_eg", 26);
        model.result().export("data1").setIndex("expr", "gas_en", 27);
        model.result().export("data1").setIndex("unit", "mol/L", 27);
        model.result().export("data1").setIndex("descr", "gas_en", 27);
        model.result().export("data1").setIndex("expr", "Calcite", 28);
        model.result().export("data1").setIndex("unit", "mol/L", 28);
        model.result().export("data1").setIndex("descr", "Calcite", 28);
        model.result().export("data1").setIndex("expr", "Dolomitemoinsdis", 29);
        model.result().export("data1").setIndex("unit", "mol/L", 29);
        model.result().export("data1").setIndex("descr", "Dolomite-dis", 29);
        model.result().export("data1").setIndex("expr", "Tin", 30);
        model.result().export("data1").setIndex("unit", "mol/L", 30);
        model.result().export("data1").setIndex("descr", "Tin", 30);
      }
    }